OpenVSP model (file version 5), 99 components.
Geometry view with OpenVSP parameter names; values to 6 digits, angles in degrees, lengths in the model's unit.
Overall bounding box: X_Min=0 X_Len=49.893 Y_Min=-20.1711 Y_Len=40.3423 Z_Min=-6.6413 Z_Len=14.5466

Fuselage "Fuselage"
  location (X Y Z) 0 0 0, rotation 0 0 0
  bounding box size 48.4 6.33404 5.93757
  mass: Density=0 Shell_Flag=0 Mass_Area=0 Mass_Prior=1 PointMass=221.491 CGx=24.2 CGy=0 CGz=0 Ixx=0 Iyy=0 Izz=0 Ixy=0 Ixz=0 Iyz=0
  Design: Length=48.4
  cross sections:
    n  XLocPercent  YLocPercent  YRotate  ZLocPercent  shape
    0  0            0            -1       -0.0306681   point
    1  0.223361     0            -2       -0.00985761  general fuselage BotStr=0.836571 BotTanAngle=90 CornerRad=0 Height=3.6 LowStr=0.1 MaxWidthLoc=0 TopStr=0.954214 TopTanAngle=90 UpStr=0.1 Width=4.2
    2  0.394304     0            -2       0.00438116   general fuselage BotStr=0.615863 BotTanAngle=90 CornerRad=0 Height=5 LowStr=0.1 MaxWidthLoc=0 TopStr=0.622398 TopTanAngle=90 UpStr=0.1 Width=5.38088
    3  0.706182     0            0        -0.0109529   general fuselage BotStr=1.09146 BotTanAngle=90 CornerRad=0 Height=5.2 LowStr=0.333321 MaxWidthLoc=0.235714 TopStr=0.450964 TopTanAngle=90 UpStr=0.352929 Width=6.02041
    4  0.875        0            0        -0.0109529   general fuselage BotStr=1.02311 BotTanAngle=90 CornerRad=0 Height=4.75 LowStr=0 MaxWidthLoc=0.142857 TopStr=0.488608 TopTanAngle=90 UpStr=0.414211 Width=5.5
    5  1            0            0        -0.0107463   general fuselage BotStr=0.830036 BotTanAngle=90 CornerRad=0 Height=3.9 LowStr=0.952373 MaxWidthLoc=0.171429 TopStr=0.620893 TopTanAngle=90 UpStr=0.470571 Width=4

Fuselage "Canopy", child of "Fuselage"
  location (X Y Z) 9.7 0 1, rotation 0 -5.90164 0
  bounding box size 18.2644 2.50007 5.33179
  mass: Density=0 Shell_Flag=0 Mass_Area=0 Mass_Prior=0
  Design: Length=18
  cross sections:
    n  XLocPercent  YLocPercent  YRotate  ZLocPercent  shape
    0  0            0            0        0.0075       point
    1  0.247329     0            0        0.0163934    super ellipse Super_Height=3 Super_M=2 Super_MaxWidthLoc=-0.171429 Super_N=2 Super_Width=2.5
    2  0.45709      0            7.07143  -0.00333333  super ellipse Super_Height=3 Super_M=2 Super_MaxWidthLoc=-0.5 Super_N=2 Super_Width=2.5
    3  1            0            0        -0.0444444   point

Custom "Seat", child of "Canopy"
  location (X Y Z) 13.15 0 -0.65, rotation 0 -70 0
  bounding box size 3.78422 1.5833 4.90964
  mass: Density=0 Shell_Flag=0 Mass_Area=0 Mass_Prior=1 PointMass=9.883 CGx=0 CGy=0 CGz=0 Ixx=0 Iyy=0 Izz=0 Ixy=0 Ixz=0 Iyz=0
  Design: BackAngle=0 BackHeight=3.25 BackThick=0.5 SeatHeight=0.833 SeatLength=2.2 Width=1.5833
  custom script Seat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

Human "Pilot (Female 20%)", child of "Seat"
  location (X Y Z) 13.5 0 0.8, rotation 0 25 0
  bounding box size 3.67282 2.08581 3.30054
  mass: Density=2.01745 Shell_Flag=0 Mass_Area=0 Mass_Prior=1 PointMass=6.216 CGx=0 CGy=0 CGz=0 Ixx=0 Iyy=0 Izz=0 Ixy=0 Ixz=0 Iyz=0
  Anthropometric: Age=30 AutoDensity=1 BMI=37.4545 BMI_pct=0.869004 GenderFlag=1 LenUnit=4 Mass=6.21619 MassUnit=4 SitFrac=0.51 Stature=5.106 Stature_pct=0.200253 Volume=3.0812

Fuselage "Air Intake", child of "Fuselage"
  location (X Y Z) 14 3.1 0, rotation 0 0 0
  symmetric about XZ
  bounding box size 33.5498 7.5 1.92147
  mass: Density=0 Shell_Flag=0 Mass_Area=0 Mass_Prior=0
  Design: Length=33.5
  cross sections:
    n  XLocPercent  XRotate   YLocPercent  YRotate   ZLocPercent  ZRotate  shape
    0  0            -20       -0.01        0.642857  -0.0205943   5        rounded rectangle RoundRectXSec_Radius=0.2 RoundedRect_Height=1.46341 RoundedRect_Width=1
    1  0.25         -9.28826  -0.005       0         -0.018       0        rounded rectangle RoundRectXSec_Radius=0.2 RoundedRect_Height=1.46341 RoundedRect_Width=1.30037
    2  0.5          0         0            0         -0.015       0        super ellipse Super_Height=1.3 Super_M=2 Super_MaxWidthLoc=0 Super_N=2 Super_Width=1.3
    3  0.75         0         0            0         -0.011       0        rounded rectangle RoundRectXSec_Radius=0.2 RoundedRect_Height=1.3 RoundedRect_Width=1.3
    4  0.875        0         -0.01        0         -0.01        0        as above
    5  1            0         -0.0307463   0         -0.01        0        rounded rectangle RoundRectXSec_Radius=0.2 RoundedRect_Height=0 RoundedRect_Width=0

Fuselage "S Ducts", child of "Fuselage"
  location (X Y Z) 18 3 -0.5, rotation 0 0 0
  symmetric about XZ
  bounding box size 15.5 6.735 3.875
  mass: Density=0 Shell_Flag=0 Mass_Area=0 Mass_Prior=0
  Design: Length=15.5
  cross sections:
    n  XLocPercent  XRotate   YLocPercent  ZLocPercent  shape
    0  0            -12.8571  -0.02        -0.005       rounded rectangle RoundRectXSec_Radius=0.2 RoundedRect_Height=1.2 RoundedRect_Width=0.9
    1  0.25         0         -0.015       -0.005       rounded rectangle RoundRectXSec_Radius=0.2 RoundedRect_Height=1.25 RoundedRect_Width=1.1
    2  0.5          0         -0.015       0            rounded rectangle RoundRectXSec_Radius=0.2 RoundedRect_Height=1.2 RoundedRect_Width=1.2
    3  0.75         0         -0.1775      0            rounded rectangle RoundRectXSec_Radius=0.2 RoundedRect_Height=1.5 RoundedRect_Width=1.5
    4  0.875        0         -0.1775      0            as above
    5  1            0         -0.2         0            super ellipse Super_Height=3.875 Super_M=2 Super_MaxWidthLoc=0 Super_N=2 Super_Width=3.875

Fuselage "ANAPG-81 Radar", child of "Fuselage"
  location (X Y Z) 5.8 0 -0.75, rotation 0 10 0
  bounding box size 1.3842 2.3 2.43871
  mass: Density=0 Shell_Flag=0 Mass_Area=0 Mass_Prior=0
  Design: Length=1
  cross sections:
    n  XLocPercent  YLocPercent  ZLocPercent  shape
    0  0            0            0            ellipse Ellipse_Height=0 Ellipse_Width=0
    1  0.25         0            0            ellipse Ellipse_Height=2.3 Ellipse_Width=2.3
    2  0.5          0            0            as above
    3  0.75         0            0            as above
    4  1            0            0            ellipse Ellipse_Height=0 Ellipse_Width=0

Custom "Avioincs", child of "Fuselage"
  location (X Y Z) 6.95 0 -0.2, rotation 0 0 0
  bounding box size 3.25 1.5 1
  mass: Density=15.9389 Shell_Flag=0 Mass_Area=0 Mass_Prior=1
  Design: Height=1 Length=3.25 SquareFlag=0 Width=1.5
  custom script Box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

Blank "Fuel System Mass", child of "Fuselage"
  location (X Y Z) 0 0 0, rotation 0 0 0
  mass: Density=1 Shell_Flag=0 Mass_Area=1 Mass_Prior=0 PointMass=31.432 CGx=27.195 CGy=0 CGz=0 Ixx=0 Iyy=0 Izz=0 Ixy=0 Ixz=0 Iyz=0

Blank "Ordinance Pylons Mass", child of "Fuselage"
  location (X Y Z) 0 0 0, rotation 0 0 0
  mass: Density=1 Shell_Flag=0 Mass_Area=1 Mass_Prior=0 PointMass=37.297 CGx=27.195 CGy=0 CGz=0 Ixx=0 Iyy=0 Izz=0 Ixy=0 Ixz=0 Iyz=0

Fuselage "F100-PW-229 (Engine)"
  location (X Y Z) 1 0 -0.5, rotation 0 0 0
  bounding box size 6.66717e-05 3.53553e-05 3.53553e-05
  mass: Density=0 Shell_Flag=0 Mass_Area=0 Mass_Prior=0
  Design: Length=1e-08
  cross sections:
    n  XLocPercent  YLocPercent  ZLocPercent  shape
    0  0            0            0            point
    1  0.25         0            0            ellipse Ellipse_Height=0 Ellipse_Width=0
    2  0.5          0            0            as above
    3  0.75         0            0            as above
    4  1            0            0            point

Fuselage "External Casing", child of "F100-PW-229 (Engine)"
  location (X Y Z) 33.5 0 -0.5, rotation 0 0 0
  bounding box size 14.9143 3.875 3.875
  mass: Density=0 Shell_Flag=0 Mass_Area=0 Mass_Prior=1 PointMass=167.63 CGx=7.16251 CGy=0 CGz=0 Ixx=0 Iyy=0 Izz=0 Ixy=0 Ixz=0 Iyz=0
  Design: Length=14.9143
  cross sections:
    n  XLocPercent  YLocPercent  ZLocPercent  shape
    0  0            0            0            circle Circle_Diameter=3.875
    1  0.25         0            0            circle Circle_Diameter=3.6
    2  0.5          0            0            ellipse Ellipse_Height=3.6 Ellipse_Width=3.6
    3  0.625        0            0            as above
    4  0.8125       0            0            ellipse Ellipse_Height=3.6 Ellipse_Width=3.875
    5  1            0            0            circle Circle_Diameter=3.46415

Fuselage "Nozzle Exit", child of "F100-PW-229 (Engine)"
  location (X Y Z) 46.643 0 -0.5, rotation 0 0 0
  bounding box size 3.25 3.85 3.85
  mass: Density=0 Shell_Flag=0 Mass_Area=0 Mass_Prior=0
  Design: Length=3.25
  cross sections:
    n  XLocPercent  YLocPercent  ZLocPercent  shape
    0  0            0            0            circle Circle_Diameter=3.85
    1  0.5          0            0            circle Circle_Diameter=3.65
    2  1            0            0            circle Circle_Diameter=3

Fuselage "Center Pylon"
  location (X Y Z) 18 0 -2.3, rotation 0 0 0
  bounding box size 13.8 0.75 0.5
  Design: Length=13.8
  cross sections:
    n  XLocPercent  YLocPercent  ZLocPercent  shape
    0  0            0            0            point
    1  0.25         0            0            rounded rectangle RoundRectXSec_Radius=0.2 RoundedRect_Height=0.5 RoundedRect_Width=0.75
    2  0.5          0            0            ellipse Ellipse_Height=0.5 Ellipse_Width=0.75
    3  0.75         0            0            as above
    4  1            0            0            point

Ellipsoid "Center Drop Tank", child of "Center Pylon"
  location (X Y Z) 16 0 -3.85, rotation 0 0 0
  bounding box size 17.92 2.66 2.66
  mass: Density=1 Shell_Flag=0 Mass_Area=1 Mass_Prior=0 PointMass=89.885 CGx=0 CGy=0 CGz=0 Ixx=0 Iyy=0 Izz=0 Ixy=0 Ixz=0 Iyz=0
  Design: A_Radius=8.96 B_Radius=1.33 C_Radius=1.33

Fuselage "Inward Pylons"
  location (X Y Z) 24 -6.06557 -0.95, rotation 0 0 0
  symmetric about XZ
  bounding box size 8 12.6311 0.7
  Design: Length=8
  cross sections:
    n  XLocPercent  YLocPercent  ZLocPercent  shape
    0  0            0            -0.025       point
    1  0.25         0            0            rounded rectangle RoundRectXSec_Radius=0.2 RoundedRect_Height=0.7 RoundedRect_Width=0.5
    2  0.5          0            0            ellipse Ellipse_Height=0.7 Ellipse_Width=0.5
    3  0.75         0            0            as above
    4  1            0            -0.025       point

Custom "MK-83 Adapter", child of "Inward Pylons"
  location (X Y Z) 25.5 6.066 -1.5, rotation 90 0 0
  symmetric about XZ
  bounding box size 5 13.632 0.5
  Design: Height=1.5 Length=5 SquareFlag=0 Width=0.5
  custom script Box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

Ellipsoid "MK-83 JDAM (1)", child of "MK-83 Adapter"
  location (X Y Z) 23 5.325 -2.325, rotation 0 0 0
  symmetric about XZ
  bounding box size 9.834 11.8166 1.166
  Design: A_Radius=4.917 B_Radius=0.5833 C_Radius=0.583

Wing "Aft Fin 1", child of "MK-83 JDAM (1)"
  location (X Y Z) 32.5 5.125 -2.4, rotation 45 0 -171.75
  symmetric about XZ
  bounding box size 1.65519 10.3632 0.625441
  totals: TotalSpan=1 TotalProjectedSpan=1 TotalChord=1 TotalArea=1 TotalAR=1 MAC=1.12
  root: chord 1.6, twist 0, NACA 4-series Camber=0 CamberLoc=0.2 ThickChord=0.1
  sections:
    n  Span  Root_Chord  Tip_Chord  Area  Sweep  Sweep_Location  Dihedral  Twist  Twist_Location  tip airfoil
    1  0.5   1.6         0.4        0.5   30     0               0         0      0.25            as above

Wing "Aft Fin 2", child of "MK-83 JDAM (1)"
  location (X Y Z) 32.5 5.525 -2.4, rotation 135 0 -171.15
  symmetric about XZ
  bounding box size 1.65788 12.21 0.636606
  totals: TotalSpan=1 TotalProjectedSpan=1 TotalChord=1 TotalArea=1 TotalAR=1 MAC=1.12
  root: chord 1.6, twist 0, NACA 4-series Camber=0 CamberLoc=0.2 ThickChord=0.1
  sections:
    n  Span  Root_Chord  Tip_Chord  Area  Sweep  Sweep_Location  Dihedral  Twist  Twist_Location  tip airfoil
    1  0.5   1.6         0.4        0.5   30     0               0         0      0.25            as above

Wing "Aft Fin 3", child of "MK-83 JDAM (1)"
  location (X Y Z) 32.5 5.125 -2.25, rotation -45 0 -171.15
  symmetric about XZ
  bounding box size 1.65788 10.3632 0.636606
  totals: TotalSpan=1 TotalProjectedSpan=1 TotalChord=1 TotalArea=1 TotalAR=1 MAC=1.12
  root: chord 1.6, twist 0, NACA 4-series Camber=0 CamberLoc=0.2 ThickChord=0.1
  sections:
    n  Span  Root_Chord  Tip_Chord  Area  Sweep  Sweep_Location  Dihedral  Twist  Twist_Location  tip airfoil
    1  0.5   1.6         0.4        0.5   30     0               0         0      0.25            as above

Wing "Aft Fin 4", child of "MK-83 JDAM (1)"
  location (X Y Z) 32.5 5.525 -2.25, rotation -135 0 -171.75
  symmetric about XZ
  bounding box size 1.65519 12.1877 0.625441
  totals: TotalSpan=1 TotalProjectedSpan=1 TotalChord=1 TotalArea=1 TotalAR=1 MAC=1.12
  root: chord 1.6, twist 0, NACA 4-series Camber=0 CamberLoc=0.2 ThickChord=0.1
  sections:
    n  Span  Root_Chord  Tip_Chord  Area  Sweep  Sweep_Location  Dihedral  Twist  Twist_Location  tip airfoil
    1  0.5   1.6         0.4        0.5   30     0               0         0      0.25            as above

Ellipsoid "MK-83 JDAM (2)", child of "MK-83 Adapter"
  location (X Y Z) 23 6.825 -2.325, rotation 0 0 0
  symmetric about XZ
  bounding box size 9.834 14.8166 1.166
  Design: A_Radius=4.917 B_Radius=0.5833 C_Radius=0.583

Wing "Aft Fin 1", child of "MK-83 JDAM (2)"
  location (X Y Z) 32.5 6.625 -2.4, rotation 45 0 -171.75
  symmetric about XZ
  bounding box size 1.65519 13.3632 0.625441
  totals: TotalSpan=1 TotalProjectedSpan=1 TotalChord=1 TotalArea=1 TotalAR=1 MAC=1.12
  root: chord 1.6, twist 0, NACA 4-series Camber=0 CamberLoc=0.2 ThickChord=0.1
  sections:
    n  Span  Root_Chord  Tip_Chord  Area  Sweep  Sweep_Location  Dihedral  Twist  Twist_Location  tip airfoil
    1  0.5   1.6         0.4        0.5   30     0               0         0      0.25            as above

Wing "Aft Fin 2", child of "MK-83 JDAM (2)"
  location (X Y Z) 32.5 7.025 -2.4, rotation 135 0 -171.15
  symmetric about XZ
  bounding box size 1.65788 15.21 0.636606
  totals: TotalSpan=1 TotalProjectedSpan=1 TotalChord=1 TotalArea=1 TotalAR=1 MAC=1.12
  root: chord 1.6, twist 0, NACA 4-series Camber=0 CamberLoc=0.2 ThickChord=0.1
  sections:
    n  Span  Root_Chord  Tip_Chord  Area  Sweep  Sweep_Location  Dihedral  Twist  Twist_Location  tip airfoil
    1  0.5   1.6         0.4        0.5   30     0               0         0      0.25            as above

Wing "Aft Fin 3", child of "MK-83 JDAM (2)"
  location (X Y Z) 32.5 6.626 -2.25, rotation -45 0 -171.15
  symmetric about XZ
  bounding box size 1.65788 13.3652 0.636606
  totals: TotalSpan=1 TotalProjectedSpan=1 TotalChord=1 TotalArea=1 TotalAR=1 MAC=1.12
  root: chord 1.6, twist 0, NACA 4-series Camber=0 CamberLoc=0.2 ThickChord=0.1
  sections:
    n  Span  Root_Chord  Tip_Chord  Area  Sweep  Sweep_Location  Dihedral  Twist  Twist_Location  tip airfoil
    1  0.5   1.6         0.4        0.5   30     0               0         0      0.25            as above

Wing "Aft Fin 4", child of "MK-83 JDAM (2)"
  location (X Y Z) 32.5 7.025 -2.25, rotation -135 0 -171.75
  symmetric about XZ
  bounding box size 1.65519 15.1877 0.625441
  totals: TotalSpan=1 TotalProjectedSpan=1 TotalChord=1 TotalArea=1 TotalAR=1 MAC=1.12
  root: chord 1.6, twist 0, NACA 4-series Camber=0 CamberLoc=0.2 ThickChord=0.1
  sections:
    n  Span  Root_Chord  Tip_Chord  Area  Sweep  Sweep_Location  Dihedral  Twist  Twist_Location  tip airfoil
    1  0.5   1.6         0.4        0.5   30     0               0         0      0.25            as above

Ellipsoid "Side Drop Tanks", child of "Inward Pylons"
  location (X Y Z) 16 6.066 -2.75, rotation 0 0 0
  symmetric about XZ
  bounding box size 17.92 14.792 2.66
  mass: Density=1 Shell_Flag=0 Mass_Area=1 Mass_Prior=0 PointMass=89.885 CGx=0 CGy=0 CGz=0 Ixx=0 Iyy=0 Izz=0 Ixy=0 Ixz=0 Iyz=0
  Design: A_Radius=8.96 B_Radius=1.33 C_Radius=1.33

Fuselage "Middle Pylons"
  location (X Y Z) 26.25 -9.5 -0.925, rotation 0 0 0
  symmetric about XZ
  bounding box size 7 19.5 0.7
  Design: Length=7
  cross sections:
    n  XLocPercent  YLocPercent  ZLocPercent  shape
    0  0            0            -0.025       point
    1  0.25         0            0            rounded rectangle RoundRectXSec_Radius=0.2 RoundedRect_Height=0.7 RoundedRect_Width=0.5
    2  0.5          0            0            ellipse Ellipse_Height=0.7 Ellipse_Width=0.5
    3  0.75         0            0            as above
    4  1            0            -0.025       point

Fuselage "Outward Pylons"
  location (X Y Z) 28.5 12.934 -0.9, rotation 0 0 0
  symmetric about XZ
  bounding box size 6 26.368 0.7
  Design: Length=6
  cross sections:
    n  XLocPercent  YLocPercent  ZLocPercent  shape
    0  0            0            -0.025       point
    1  0.25         0            0            rounded rectangle RoundRectXSec_Radius=0.2 RoundedRect_Height=0.7 RoundedRect_Width=0.5
    2  0.5          0            0            ellipse Ellipse_Height=0.7 Ellipse_Width=0.5
    3  0.75         0            0            as above
    4  1            0            -0.025       point

Fuselage "AIM-120C (inner)"
  location (X Y Z) 21 6.066 -1.58333, rotation 0 0 0
  symmetric about XZ
  bounding box size 12 12.8855 0.753536
  mass: Density=1 Shell_Flag=0 Mass_Area=1 Mass_Prior=0 PointMass=356 CGx=0 CGy=0 CGz=0 Ixx=0 Iyy=0 Izz=0 Ixy=0 Ixz=0 Iyz=0
  Design: Length=12
  cross sections:
    n  XLocPercent  YLocPercent  ZLocPercent  shape
    0  0            0            0            point
    1  0.25         0            0            ellipse Ellipse_Height=0.5833 Ellipse_Width=0.5833
    2  0.5          0            0            as above
    3  0.75         0            0            as above
    4  1            0            0            as above

Wing "Aft Fin 1", child of "AIM-120C (inner)"
  location (X Y Z) 33 5.866 -1.80833, rotation 45 0 180
  symmetric about XZ
  bounding box size 1.6 11.8452 0.466756
  totals: TotalSpan=1 TotalProjectedSpan=1 TotalChord=1 TotalArea=1 TotalAR=1 MAC=1.12
  root: chord 1.6, twist 0, NACA 4-series Camber=0 CamberLoc=0.2 ThickChord=0.1
  sections:
    n  Span  Root_Chord  Tip_Chord  Area  Sweep  Sweep_Location  Dihedral  Twist  Twist_Location  tip airfoil
    1  0.5   1.6         0.4        0.5   30     0               0         0      0.25            as above

Wing "Aft Fin 2", child of "AIM-120C (inner)"
  location (X Y Z) 33 6.266 -1.80833, rotation 135 0 180
  symmetric about XZ
  bounding box size 1.6 13.3523 0.466756
  totals: TotalSpan=1 TotalProjectedSpan=1 TotalChord=1 TotalArea=1 TotalAR=1 MAC=1.12
  root: chord 1.6, twist 0, NACA 4-series Camber=0 CamberLoc=0.2 ThickChord=0.1
  sections:
    n  Span  Root_Chord  Tip_Chord  Area  Sweep  Sweep_Location  Dihedral  Twist  Twist_Location  tip airfoil
    1  0.5   1.6         0.4        0.5   30     0               0         0      0.25            as above

Wing "Aft Fin 3", child of "AIM-120C (inner)"
  location (X Y Z) 33 5.866 -1.35833, rotation -45 0 180
  symmetric about XZ
  bounding box size 1.6 11.8452 0.466756
  totals: TotalSpan=1 TotalProjectedSpan=1 TotalChord=1 TotalArea=1 TotalAR=1 MAC=1.12
  root: chord 1.6, twist 0, NACA 4-series Camber=0 CamberLoc=0.2 ThickChord=0.1
  sections:
    n  Span  Root_Chord  Tip_Chord  Area  Sweep  Sweep_Location  Dihedral  Twist  Twist_Location  tip airfoil
    1  0.5   1.6         0.4        0.5   30     0               0         0      0.25            as above

Wing "Aft Fin 4", child of "AIM-120C (inner)"
  location (X Y Z) 33 6.266 -1.35833, rotation -135 0 180
  symmetric about XZ
  bounding box size 1.6 13.3523 0.466756
  totals: TotalSpan=1 TotalProjectedSpan=1 TotalChord=1 TotalArea=1 TotalAR=1 MAC=1.12
  root: chord 1.6, twist 0, NACA 4-series Camber=0 CamberLoc=0.2 ThickChord=0.1
  sections:
    n  Span  Root_Chord  Tip_Chord  Area  Sweep  Sweep_Location  Dihedral  Twist  Twist_Location  tip airfoil
    1  0.5   1.6         0.4        0.5   30     0               0         0      0.25            as above

Wing "Canard 1", child of "AIM-120C (inner)"
  location (X Y Z) 27.3 5.866 -1.80833, rotation 45 0 180
  symmetric about XZ
  bounding box size 0.8 11.7886 0.233378
  totals: TotalSpan=0.5 TotalProjectedSpan=0.5 TotalChord=0.5 TotalArea=0.25 TotalAR=1 MAC=0.56
  root: chord 0.8, twist 0, NACA 4-series Camber=0 CamberLoc=0.2 ThickChord=0.1
  sections:
    n  Span  Root_Chord  Tip_Chord  Area   Sweep  Sweep_Location  Dihedral  Twist  Twist_Location  tip airfoil
    1  0.25  0.8         0.2        0.125  30     0               0         0      0.25            as above

Wing "Canard 2", child of "AIM-120C (inner)"
  location (X Y Z) 27.3 6.266 -1.80833, rotation 135 0 180
  symmetric about XZ
  bounding box size 0.8 12.9422 0.233378
  totals: TotalSpan=0.5 TotalProjectedSpan=0.5 TotalChord=0.5 TotalArea=0.25 TotalAR=1 MAC=0.56
  root: chord 0.8, twist 0, NACA 4-series Camber=0 CamberLoc=0.2 ThickChord=0.1
  sections:
    n  Span  Root_Chord  Tip_Chord  Area   Sweep  Sweep_Location  Dihedral  Twist  Twist_Location  tip airfoil
    1  0.25  0.8         0.2        0.125  30     0               0         0      0.25            as above

Wing "Canard 3", child of "AIM-120C (inner)"
  location (X Y Z) 27.3 5.866 -1.35833, rotation -45 0 180
  symmetric about XZ
  bounding box size 0.8 11.7886 0.233378
  totals: TotalSpan=0.5 TotalProjectedSpan=0.5 TotalChord=0.5 TotalArea=0.25 TotalAR=1 MAC=0.56
  root: chord 0.8, twist 0, NACA 4-series Camber=0 CamberLoc=0.2 ThickChord=0.1
  sections:
    n  Span  Root_Chord  Tip_Chord  Area   Sweep  Sweep_Location  Dihedral  Twist  Twist_Location  tip airfoil
    1  0.25  0.8         0.2        0.125  30     0               0         0      0.25            as above

Wing "Canard 4", child of "AIM-120C (inner)"
  location (X Y Z) 27.3 6.266 -1.35833, rotation -135 0 180
  symmetric about XZ
  bounding box size 0.8 12.9422 0.233378
  totals: TotalSpan=0.5 TotalProjectedSpan=0.5 TotalChord=0.5 TotalArea=0.25 TotalAR=1 MAC=0.56
  root: chord 0.8, twist 0, NACA 4-series Camber=0 CamberLoc=0.2 ThickChord=0.1
  sections:
    n  Span  Root_Chord  Tip_Chord  Area   Sweep  Sweep_Location  Dihedral  Twist  Twist_Location  tip airfoil
    1  0.25  0.8         0.2        0.125  30     0               0         0      0.25            as above

Fuselage "AIM-120C (mid)"
  location (X Y Z) 21.5 9.5 -1.575, rotation 0 0 0
  symmetric about XZ
  bounding box size 12 19.7535 0.753536
  mass: Density=1 Shell_Flag=0 Mass_Area=1 Mass_Prior=0 PointMass=356 CGx=0 CGy=0 CGz=0 Ixx=0 Iyy=0 Izz=0 Ixy=0 Ixz=0 Iyz=0
  Design: Length=12
  cross sections:
    n  XLocPercent  YLocPercent  ZLocPercent  shape
    0  0            0            0            point
    1  0.25         0            0            ellipse Ellipse_Height=0.5833 Ellipse_Width=0.5833
    2  0.5          0            0            as above
    3  0.75         0            0            as above
    4  1            0            0            as above

Wing "Aft Fin 1", child of "AIM-120C (mid)"
  location (X Y Z) 33.5 9.3 -1.8, rotation 45 0 180
  symmetric about XZ
  bounding box size 1.6 18.7132 0.466756
  totals: TotalSpan=1 TotalProjectedSpan=1 TotalChord=1 TotalArea=1 TotalAR=1 MAC=1.12
  root: chord 1.6, twist 0, NACA 4-series Camber=0 CamberLoc=0.2 ThickChord=0.1
  sections:
    n  Span  Root_Chord  Tip_Chord  Area  Sweep  Sweep_Location  Dihedral  Twist  Twist_Location  tip airfoil
    1  0.5   1.6         0.4        0.5   30     0               0         0      0.25            as above

Wing "Aft Fin 2", child of "AIM-120C (mid)"
  location (X Y Z) 33.5 9.7 -1.8, rotation 135 0 180
  symmetric about XZ
  bounding box size 1.6 20.2203 0.466756
  totals: TotalSpan=1 TotalProjectedSpan=1 TotalChord=1 TotalArea=1 TotalAR=1 MAC=1.12
  root: chord 1.6, twist 0, NACA 4-series Camber=0 CamberLoc=0.2 ThickChord=0.1
  sections:
    n  Span  Root_Chord  Tip_Chord  Area  Sweep  Sweep_Location  Dihedral  Twist  Twist_Location  tip airfoil
    1  0.5   1.6         0.4        0.5   30     0               0         0      0.25            as above

Wing "Aft Fin 3", child of "AIM-120C (mid)"
  location (X Y Z) 33.5 9.3 -1.5, rotation -45 0 180
  symmetric about XZ
  bounding box size 1.6 18.7132 0.466756
  totals: TotalSpan=1 TotalProjectedSpan=1 TotalChord=1 TotalArea=1 TotalAR=1 MAC=1.12
  root: chord 1.6, twist 0, NACA 4-series Camber=0 CamberLoc=0.2 ThickChord=0.1
  sections:
    n  Span  Root_Chord  Tip_Chord  Area  Sweep  Sweep_Location  Dihedral  Twist  Twist_Location  tip airfoil
    1  0.5   1.6         0.4        0.5   30     0               0         0      0.25            as above

Wing "Aft Fin 4", child of "AIM-120C (mid)"
  location (X Y Z) 33.5 9.7 -1.5, rotation -135 0 180
  symmetric about XZ
  bounding box size 1.6 20.2203 0.466756
  totals: TotalSpan=1 TotalProjectedSpan=1 TotalChord=1 TotalArea=1 TotalAR=1 MAC=1.12
  root: chord 1.6, twist 0, NACA 4-series Camber=0 CamberLoc=0.2 ThickChord=0.1
  sections:
    n  Span  Root_Chord  Tip_Chord  Area  Sweep  Sweep_Location  Dihedral  Twist  Twist_Location  tip airfoil
    1  0.5   1.6         0.4        0.5   30     0               0         0      0.25            as above

Wing "Canard 1", child of "AIM-120C (mid)"
  location (X Y Z) 27.8 9.3 -1.8, rotation 45 0 180
  symmetric about XZ
  bounding box size 0.8 18.6566 0.233378
  totals: TotalSpan=0.5 TotalProjectedSpan=0.5 TotalChord=0.5 TotalArea=0.25 TotalAR=1 MAC=0.56
  root: chord 0.8, twist 0, NACA 4-series Camber=0 CamberLoc=0.2 ThickChord=0.1
  sections:
    n  Span  Root_Chord  Tip_Chord  Area   Sweep  Sweep_Location  Dihedral  Twist  Twist_Location  tip airfoil
    1  0.25  0.8         0.2        0.125  30     0               0         0      0.25            as above

Wing "Canard 2", child of "AIM-120C (mid)"
  location (X Y Z) 27.8 9.7 -1.8, rotation 135 0 180
  symmetric about XZ
  bounding box size 0.8 19.8102 0.233378
  totals: TotalSpan=0.5 TotalProjectedSpan=0.5 TotalChord=0.5 TotalArea=0.25 TotalAR=1 MAC=0.56
  root: chord 0.8, twist 0, NACA 4-series Camber=0 CamberLoc=0.2 ThickChord=0.1
  sections:
    n  Span  Root_Chord  Tip_Chord  Area   Sweep  Sweep_Location  Dihedral  Twist  Twist_Location  tip airfoil
    1  0.25  0.8         0.2        0.125  30     0               0         0      0.25            as above

Wing "Canard 3", child of "AIM-120C (mid)"
  location (X Y Z) 27.8 9.3 -1.5, rotation -45 0 180
  symmetric about XZ
  bounding box size 0.8 18.6566 0.233378
  totals: TotalSpan=0.5 TotalProjectedSpan=0.5 TotalChord=0.5 TotalArea=0.25 TotalAR=1 MAC=0.56
  root: chord 0.8, twist 0, NACA 4-series Camber=0 CamberLoc=0.2 ThickChord=0.1
  sections:
    n  Span  Root_Chord  Tip_Chord  Area   Sweep  Sweep_Location  Dihedral  Twist  Twist_Location  tip airfoil
    1  0.25  0.8         0.2        0.125  30     0               0         0      0.25            as above

Wing "Canard 4", child of "AIM-120C (mid)"
  location (X Y Z) 27.8 9.7 -1.5, rotation -135 0 180
  symmetric about XZ
  bounding box size 0.8 19.8102 0.233378
  totals: TotalSpan=0.5 TotalProjectedSpan=0.5 TotalChord=0.5 TotalArea=0.25 TotalAR=1 MAC=0.56
  root: chord 0.8, twist 0, NACA 4-series Camber=0 CamberLoc=0.2 ThickChord=0.1
  sections:
    n  Span  Root_Chord  Tip_Chord  Area   Sweep  Sweep_Location  Dihedral  Twist  Twist_Location  tip airfoil
    1  0.25  0.8         0.2        0.125  30     0               0         0      0.25            as above

Fuselage "AIM-120C (outer)"
  location (X Y Z) 22.6 12.934 -1.53333, rotation 0 0 0
  symmetric about XZ
  bounding box size 12 26.6215 0.753536
  mass: Density=1 Shell_Flag=0 Mass_Area=1 Mass_Prior=0 PointMass=356 CGx=0 CGy=0 CGz=0 Ixx=0 Iyy=0 Izz=0 Ixy=0 Ixz=0 Iyz=0
  Design: Length=12
  cross sections:
    n  XLocPercent  YLocPercent  ZLocPercent  shape
    0  0            0            0            point
    1  0.25         0            0            ellipse Ellipse_Height=0.5833 Ellipse_Width=0.5833
    2  0.5          0            0            as above
    3  0.75         0            0            as above
    4  1            0            0            as above

Wing "Aft Fin 1", child of "AIM-120C (outer)"
  location (X Y Z) 34.6 12.734 -1.68333, rotation 45 0 180
  symmetric about XZ
  bounding box size 1.6 25.5812 0.466756
  totals: TotalSpan=1 TotalProjectedSpan=1 TotalChord=1 TotalArea=1 TotalAR=1 MAC=1.12
  root: chord 1.6, twist 0, NACA 4-series Camber=0 CamberLoc=0.2 ThickChord=0.1
  sections:
    n  Span  Root_Chord  Tip_Chord  Area  Sweep  Sweep_Location  Dihedral  Twist  Twist_Location  tip airfoil
    1  0.5   1.6         0.4        0.5   30     0               0         0      0.25            as above

Wing "Aft Fin 2", child of "AIM-120C (outer)"
  location (X Y Z) 34.6 13.134 -1.68333, rotation 135 0 180
  symmetric about XZ
  bounding box size 1.6 27.0883 0.466756
  totals: TotalSpan=1 TotalProjectedSpan=1 TotalChord=1 TotalArea=1 TotalAR=1 MAC=1.12
  root: chord 1.6, twist 0, NACA 4-series Camber=0 CamberLoc=0.2 ThickChord=0.1
  sections:
    n  Span  Root_Chord  Tip_Chord  Area  Sweep  Sweep_Location  Dihedral  Twist  Twist_Location  tip airfoil
    1  0.5   1.6         0.4        0.5   30     0               0         0      0.25            as above

Wing "Aft Fin 3", child of "AIM-120C (outer)"
  location (X Y Z) 34.6 12.734 -1.38333, rotation -45 0 180
  symmetric about XZ
  bounding box size 1.6 25.5812 0.466756
  totals: TotalSpan=1 TotalProjectedSpan=1 TotalChord=1 TotalArea=1 TotalAR=1 MAC=1.12
  root: chord 1.6, twist 0, NACA 4-series Camber=0 CamberLoc=0.2 ThickChord=0.1
  sections:
    n  Span  Root_Chord  Tip_Chord  Area  Sweep  Sweep_Location  Dihedral  Twist  Twist_Location  tip airfoil
    1  0.5   1.6         0.4        0.5   30     0               0         0      0.25            as above

Wing "Aft Fin 4", child of "AIM-120C (outer)"
  location (X Y Z) 34.6 13.134 -1.38333, rotation -135 0 180
  symmetric about XZ
  bounding box size 1.6 27.0883 0.466756
  totals: TotalSpan=1 TotalProjectedSpan=1 TotalChord=1 TotalArea=1 TotalAR=1 MAC=1.12
  root: chord 1.6, twist 0, NACA 4-series Camber=0 CamberLoc=0.2 ThickChord=0.1
  sections:
    n  Span  Root_Chord  Tip_Chord  Area  Sweep  Sweep_Location  Dihedral  Twist  Twist_Location  tip airfoil
    1  0.5   1.6         0.4        0.5   30     0               0         0      0.25            as above

Wing "Canard 1", child of "AIM-120C (outer)"
  location (X Y Z) 28.9 12.734 -1.68333, rotation 45 0 180
  symmetric about XZ
  bounding box size 0.8 25.5246 0.233378
  totals: TotalSpan=0.5 TotalProjectedSpan=0.5 TotalChord=0.5 TotalArea=0.25 TotalAR=1 MAC=0.56
  root: chord 0.8, twist 0, NACA 4-series Camber=0 CamberLoc=0.2 ThickChord=0.1
  sections:
    n  Span  Root_Chord  Tip_Chord  Area   Sweep  Sweep_Location  Dihedral  Twist  Twist_Location  tip airfoil
    1  0.25  0.8         0.2        0.125  30     0               0         0      0.25            as above

Wing "Canard 2", child of "AIM-120C (outer)"
  location (X Y Z) 28.9 13.134 -1.68333, rotation 135 0 180
  symmetric about XZ
  bounding box size 0.8 26.6782 0.233378
  totals: TotalSpan=0.5 TotalProjectedSpan=0.5 TotalChord=0.5 TotalArea=0.25 TotalAR=1 MAC=0.56
  root: chord 0.8, twist 0, NACA 4-series Camber=0 CamberLoc=0.2 ThickChord=0.1
  sections:
    n  Span  Root_Chord  Tip_Chord  Area   Sweep  Sweep_Location  Dihedral  Twist  Twist_Location  tip airfoil
    1  0.25  0.8         0.2        0.125  30     0               0         0      0.25            as above

Wing "Canard 3", child of "AIM-120C (outer)"
  location (X Y Z) 28.9 12.734 -1.38333, rotation -45 0 180
  symmetric about XZ
  bounding box size 0.8 25.5246 0.233378
  totals: TotalSpan=0.5 TotalProjectedSpan=0.5 TotalChord=0.5 TotalArea=0.25 TotalAR=1 MAC=0.56
  root: chord 0.8, twist 0, NACA 4-series Camber=0 CamberLoc=0.2 ThickChord=0.1
  sections:
    n  Span  Root_Chord  Tip_Chord  Area   Sweep  Sweep_Location  Dihedral  Twist  Twist_Location  tip airfoil
    1  0.25  0.8         0.2        0.125  30     0               0         0      0.25            as above

Wing "Canard 4", child of "AIM-120C (outer)"
  location (X Y Z) 28.9 13.134 -1.38333, rotation -135 0 180
  symmetric about XZ
  bounding box size 0.8 26.6782 0.233378
  totals: TotalSpan=0.5 TotalProjectedSpan=0.5 TotalChord=0.5 TotalArea=0.25 TotalAR=1 MAC=0.56
  root: chord 0.8, twist 0, NACA 4-series Camber=0 CamberLoc=0.2 ThickChord=0.1
  sections:
    n  Span  Root_Chord  Tip_Chord  Area   Sweep  Sweep_Location  Dihedral  Twist  Twist_Location  tip airfoil
    1  0.25  0.8         0.2        0.125  30     0               0         0      0.25            as above

Fuselage "AIM-9X Sidewinder"
  location (X Y Z) 27.75 17.75 -0.375, rotation 0 0 0
  symmetric about XZ
  bounding box size 10 36.3883 0.888292
  mass: Density=1 Shell_Flag=0 Mass_Area=1 Mass_Prior=0 PointMass=188 CGx=0 CGy=0 CGz=0 Ixx=0 Iyy=0 Izz=0 Ixy=0 Ixz=0 Iyz=0
  Design: Length=10
  cross sections:
    n  XLocPercent  YLocPercent  ZLocPercent  shape
    0  0            0            0            super ellipse Super_Height=0 Super_M=2 Super_MaxWidthLoc=0 Super_N=2 Super_Width=0
    1  0.25         0            0            ellipse Ellipse_Height=0.5 Ellipse_Width=0.5
    2  0.5          0            0            as above
    3  0.75         0            0            as above
    4  1            0            0            as above

Wing "Aft Fin 1", child of "AIM-9X Sidewinder"
  location (X Y Z) 37.75 17.55 -0.525, rotation 45 0 180
  symmetric about XZ
  bounding box size 1.6 35.2132 0.466756
  totals: TotalSpan=1 TotalProjectedSpan=1 TotalChord=1 TotalArea=1 TotalAR=1 MAC=1.12
  root: chord 1.6, twist 0, NACA 4-series Camber=0 CamberLoc=0.2 ThickChord=0.1
  sections:
    n  Span  Root_Chord  Tip_Chord  Area  Sweep  Sweep_Location  Dihedral  Twist  Twist_Location  tip airfoil
    1  0.5   1.6         0.4        0.5   30     0               0         0      0.25            as above

Wing "Aft Fin 2", child of "AIM-9X Sidewinder"
  location (X Y Z) 37.75 17.95 -0.525, rotation 135 0 180
  symmetric about XZ
  bounding box size 1.6 36.7203 0.466756
  totals: TotalSpan=1 TotalProjectedSpan=1 TotalChord=1 TotalArea=1 TotalAR=1 MAC=1.12
  root: chord 1.6, twist 0, NACA 4-series Camber=0 CamberLoc=0.2 ThickChord=0.1
  sections:
    n  Span  Root_Chord  Tip_Chord  Area  Sweep  Sweep_Location  Dihedral  Twist  Twist_Location  tip airfoil
    1  0.5   1.6         0.4        0.5   30     0               0         0      0.25            as above

Wing "Aft Fin 3", child of "AIM-9X Sidewinder"
  location (X Y Z) 37.75 17.55 -0.225, rotation -45 0 180
  symmetric about XZ
  bounding box size 1.6 35.2132 0.466756
  totals: TotalSpan=1 TotalProjectedSpan=1 TotalChord=1 TotalArea=1 TotalAR=1 MAC=1.12
  root: chord 1.6, twist 0, NACA 4-series Camber=0 CamberLoc=0.2 ThickChord=0.1
  sections:
    n  Span  Root_Chord  Tip_Chord  Area  Sweep  Sweep_Location  Dihedral  Twist  Twist_Location  tip airfoil
    1  0.5   1.6         0.4        0.5   30     0               0         0      0.25            as above

Wing "Aft Fin 4", child of "AIM-9X Sidewinder"
  location (X Y Z) 37.75 17.95 -0.225, rotation -135 0 180
  symmetric about XZ
  bounding box size 1.6 36.7203 0.466756
  totals: TotalSpan=1 TotalProjectedSpan=1 TotalChord=1 TotalArea=1 TotalAR=1 MAC=1.12
  root: chord 1.6, twist 0, NACA 4-series Camber=0 CamberLoc=0.2 ThickChord=0.1
  sections:
    n  Span  Root_Chord  Tip_Chord  Area  Sweep  Sweep_Location  Dihedral  Twist  Twist_Location  tip airfoil
    1  0.5   1.6         0.4        0.5   30     0               0         0      0.25            as above

Wing "Canard 1", child of "AIM-9X Sidewinder"
  location (X Y Z) 30.25 17.55 -0.525, rotation 45 0 180
  symmetric about XZ
  bounding box size 0.8 35.1566 0.233378
  totals: TotalSpan=0.5 TotalProjectedSpan=0.5 TotalChord=0.5 TotalArea=0.25 TotalAR=1 MAC=0.56
  root: chord 0.8, twist 0, NACA 4-series Camber=0 CamberLoc=0.2 ThickChord=0.1
  sections:
    n  Span  Root_Chord  Tip_Chord  Area   Sweep  Sweep_Location  Dihedral  Twist  Twist_Location  tip airfoil
    1  0.25  0.8         0.2        0.125  30     0               0         0      0.25            as above

Wing "Canard 2", child of "AIM-9X Sidewinder"
  location (X Y Z) 30.25 17.95 -0.525, rotation 135 0 180
  symmetric about XZ
  bounding box size 0.8 36.3102 0.233378
  totals: TotalSpan=0.5 TotalProjectedSpan=0.5 TotalChord=0.5 TotalArea=0.25 TotalAR=1 MAC=0.56
  root: chord 0.8, twist 0, NACA 4-series Camber=0 CamberLoc=0.2 ThickChord=0.1
  sections:
    n  Span  Root_Chord  Tip_Chord  Area   Sweep  Sweep_Location  Dihedral  Twist  Twist_Location  tip airfoil
    1  0.25  0.8         0.2        0.125  30     0               0         0      0.25            as above

Wing "Canard 3", child of "AIM-9X Sidewinder"
  location (X Y Z) 30.25 17.55 -0.225, rotation -45 0 180
  symmetric about XZ
  bounding box size 0.8 35.1566 0.233378
  totals: TotalSpan=0.5 TotalProjectedSpan=0.5 TotalChord=0.5 TotalArea=0.25 TotalAR=1 MAC=0.56
  root: chord 0.8, twist 0, NACA 4-series Camber=0 CamberLoc=0.2 ThickChord=0.1
  sections:
    n  Span  Root_Chord  Tip_Chord  Area   Sweep  Sweep_Location  Dihedral  Twist  Twist_Location  tip airfoil
    1  0.25  0.8         0.2        0.125  30     0               0         0      0.25            as above

Wing "Canard 4", child of "AIM-9X Sidewinder"
  location (X Y Z) 30.25 17.95 -0.225, rotation -135 0 180
  symmetric about XZ
  bounding box size 0.8 36.3102 0.233378
  totals: TotalSpan=0.5 TotalProjectedSpan=0.5 TotalChord=0.5 TotalArea=0.25 TotalAR=1 MAC=0.56
  root: chord 0.8, twist 0, NACA 4-series Camber=0 CamberLoc=0.2 ThickChord=0.1
  sections:
    n  Span  Root_Chord  Tip_Chord  Area   Sweep  Sweep_Location  Dihedral  Twist  Twist_Location  tip airfoil
    1  0.25  0.8         0.2        0.125  30     0               0         0      0.25            as above

Ellipsoid "MK-83 JDAM (inner)"
  location (X Y Z) 20 6.066 -1.825, rotation 0 0 0
  symmetric about XZ
  bounding box size 9.834 13.2986 1.166
  Design: A_Radius=4.917 B_Radius=0.5833 C_Radius=0.583

Wing "Aft Fin 1", child of "MK-83 JDAM (inner)"
  location (X Y Z) 29.5 5.866 -1.9, rotation 45 0 -171.75
  symmetric about XZ
  bounding box size 1.65519 11.8452 0.625441
  totals: TotalSpan=1 TotalProjectedSpan=1 TotalChord=1 TotalArea=1 TotalAR=1 MAC=1.12
  root: chord 1.6, twist 0, NACA 4-series Camber=0 CamberLoc=0.2 ThickChord=0.1
  sections:
    n  Span  Root_Chord  Tip_Chord  Area  Sweep  Sweep_Location  Dihedral  Twist  Twist_Location  tip airfoil
    1  0.5   1.6         0.4        0.5   30     0               0         0      0.25            as above

Wing "Aft Fin 2", child of "MK-83 JDAM (inner)"
  location (X Y Z) 29.5 6.266 -1.9, rotation 135 0 -171.15
  symmetric about XZ
  bounding box size 1.65788 13.692 0.636606
  totals: TotalSpan=1 TotalProjectedSpan=1 TotalChord=1 TotalArea=1 TotalAR=1 MAC=1.12
  root: chord 1.6, twist 0, NACA 4-series Camber=0 CamberLoc=0.2 ThickChord=0.1
  sections:
    n  Span  Root_Chord  Tip_Chord  Area  Sweep  Sweep_Location  Dihedral  Twist  Twist_Location  tip airfoil
    1  0.5   1.6         0.4        0.5   30     0               0         0      0.25            as above

Wing "Aft Fin 3", child of "MK-83 JDAM (inner)"
  location (X Y Z) 29.5 5.866 -1.75, rotation -45 0 -171.15
  symmetric about XZ
  bounding box size 1.65788 11.8452 0.636606
  totals: TotalSpan=1 TotalProjectedSpan=1 TotalChord=1 TotalArea=1 TotalAR=1 MAC=1.12
  root: chord 1.6, twist 0, NACA 4-series Camber=0 CamberLoc=0.2 ThickChord=0.1
  sections:
    n  Span  Root_Chord  Tip_Chord  Area  Sweep  Sweep_Location  Dihedral  Twist  Twist_Location  tip airfoil
    1  0.5   1.6         0.4        0.5   30     0               0         0      0.25            as above

Wing "Aft Fin 4", child of "MK-83 JDAM (inner)"
  location (X Y Z) 29.5 6.266 -1.75, rotation -135 0 -171.75
  symmetric about XZ
  bounding box size 1.65519 13.6697 0.625441
  totals: TotalSpan=1 TotalProjectedSpan=1 TotalChord=1 TotalArea=1 TotalAR=1 MAC=1.12
  root: chord 1.6, twist 0, NACA 4-series Camber=0 CamberLoc=0.2 ThickChord=0.1
  sections:
    n  Span  Root_Chord  Tip_Chord  Area  Sweep  Sweep_Location  Dihedral  Twist  Twist_Location  tip airfoil
    1  0.5   1.6         0.4        0.5   30     0               0         0      0.25            as above

Ellipsoid "MK-83 JDAM (mid)"
  location (X Y Z) 24 9.5 -1.925, rotation 0 0 0
  symmetric about XZ
  bounding box size 9.834 20.1666 1.166
  Design: A_Radius=4.917 B_Radius=0.5833 C_Radius=0.583

Wing "Aft Fin 1", child of "MK-83 JDAM (mid)"
  location (X Y Z) 33.5 9.3 -2, rotation 45 0 -171.75
  symmetric about XZ
  bounding box size 1.65519 18.7132 0.625441
  totals: TotalSpan=1 TotalProjectedSpan=1 TotalChord=1 TotalArea=1 TotalAR=1 MAC=1.12
  root: chord 1.6, twist 0, NACA 4-series Camber=0 CamberLoc=0.2 ThickChord=0.1
  sections:
    n  Span  Root_Chord  Tip_Chord  Area  Sweep  Sweep_Location  Dihedral  Twist  Twist_Location  tip airfoil
    1  0.5   1.6         0.4        0.5   30     0               0         0      0.25            as above

Wing "Aft Fin 2", child of "MK-83 JDAM (mid)"
  location (X Y Z) 33.5 9.7 -2, rotation 135 0 -171.15
  symmetric about XZ
  bounding box size 1.65788 20.56 0.636606
  totals: TotalSpan=1 TotalProjectedSpan=1 TotalChord=1 TotalArea=1 TotalAR=1 MAC=1.12
  root: chord 1.6, twist 0, NACA 4-series Camber=0 CamberLoc=0.2 ThickChord=0.1
  sections:
    n  Span  Root_Chord  Tip_Chord  Area  Sweep  Sweep_Location  Dihedral  Twist  Twist_Location  tip airfoil
    1  0.5   1.6         0.4        0.5   30     0               0         0      0.25            as above

Wing "Aft Fin 3", child of "MK-83 JDAM (mid)"
  location (X Y Z) 33.5 9.3 -1.85, rotation -45 0 -171.15
  symmetric about XZ
  bounding box size 1.65788 18.7132 0.636606
  totals: TotalSpan=1 TotalProjectedSpan=1 TotalChord=1 TotalArea=1 TotalAR=1 MAC=1.12
  root: chord 1.6, twist 0, NACA 4-series Camber=0 CamberLoc=0.2 ThickChord=0.1
  sections:
    n  Span  Root_Chord  Tip_Chord  Area  Sweep  Sweep_Location  Dihedral  Twist  Twist_Location  tip airfoil
    1  0.5   1.6         0.4        0.5   30     0               0         0      0.25            as above

Wing "Aft Fin 4", child of "MK-83 JDAM (mid)"
  location (X Y Z) 33.5 9.7 -1.85, rotation -135 0 -171.75
  symmetric about XZ
  bounding box size 1.65519 20.5377 0.625441
  totals: TotalSpan=1 TotalProjectedSpan=1 TotalChord=1 TotalArea=1 TotalAR=1 MAC=1.12
  root: chord 1.6, twist 0, NACA 4-series Camber=0 CamberLoc=0.2 ThickChord=0.1
  sections:
    n  Span  Root_Chord  Tip_Chord  Area  Sweep  Sweep_Location  Dihedral  Twist  Twist_Location  tip airfoil
    1  0.5   1.6         0.4        0.5   30     0               0         0      0.25            as above

Fuselage "Fuselage Fuel Tanks"
  location (X Y Z) 0 0 0, rotation 0 0 0
  bounding box size 48.4 6.33404 5.93757
  mass: Density=0 Shell_Flag=0 Mass_Area=0 Mass_Prior=1
  Design: Length=48.4
  cross sections:
    n  XLocPercent  YLocPercent  YRotate  ZLocPercent  shape
    0  0            0            -1       -0.0306681   point
    1  0.223361     0            -2       -0.00985761  general fuselage BotStr=0.836571 BotTanAngle=90 CornerRad=0 Height=3.6 LowStr=0.1 MaxWidthLoc=0 TopStr=0.954214 TopTanAngle=90 UpStr=0.1 Width=4.2
    2  0.394304     0            -2       0.00438116   general fuselage BotStr=0.615863 BotTanAngle=90 CornerRad=0 Height=5 LowStr=0.1 MaxWidthLoc=0 TopStr=0.622398 TopTanAngle=90 UpStr=0.1 Width=5.38088
    3  0.706182     0            0        -0.0109529   general fuselage BotStr=1.09146 BotTanAngle=90 CornerRad=0 Height=5.2 LowStr=0.333321 MaxWidthLoc=0.235714 TopStr=0.450964 TopTanAngle=90 UpStr=0.352929 Width=6.02041
    4  0.875        0            0        -0.0109529   general fuselage BotStr=1.02311 BotTanAngle=90 CornerRad=0 Height=4.75 LowStr=0 MaxWidthLoc=0.142857 TopStr=0.488608 TopTanAngle=90 UpStr=0.414211 Width=5.5
    5  1            0            0        -0.0107463   general fuselage BotStr=0.830036 BotTanAngle=90 CornerRad=0 Height=3.9 LowStr=0.952373 MaxWidthLoc=0.171429 TopStr=0.620893 TopTanAngle=90 UpStr=0.470571 Width=4

Custom "Fuel Tank 1", child of "Fuselage Fuel Tanks"
  location (X Y Z) 22.3 0 -0.275, rotation 0 2.5 0
  bounding box size 4.03981 4 1.17353
  mass: Density=1.563 Shell_Flag=0 Mass_Area=0 Mass_Prior=2
  Design: Height=1 Length=4 SquareFlag=0 Width=4
  custom script Box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

Conformal "Fuel Tank 2", child of "Fuselage Fuel Tanks"
  location (X Y Z) 0 0 0, rotation 0 0 0
  bounding box size 9.67015 5.38779 2.26142
  mass: Density=1.563 Shell_Flag=0 Mass_Area=0 Mass_Prior=2
  Design: ChordTrimFlag=0 ChordTrimMax=0.9 ChordTrimMin=0.1 EtaTrimMax=0.9 EtaTrimMin=0.1 L01Max=1 L01Min=1 L0LenTrimMax=31.9196 L0LenTrimMin=22.3119 LTrimMax=0.658148 LTrimMin=0.460048 OffSetEnds=1 Offset=0.075 Side1Trim=0.1 Side1TrimFlag=1 Side2Trim=0.1 Side2TrimFlag=1 Side3Trim=0.1 Side3TrimFlag=1 Side4Trim=0.1 Side4TrimFlag=1 UMaxTrimTypeFalg=0 UMinTrimTypeFalg=0 UTrimFlag=1 UTrimMax=0.56 UTrimMin=0.45 V1TrimBegin=1 V1TrimEnd=0.5 V1TrimFlag=1 V2TrimBegin=1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

Conformal "Fuel Tank 3", child of "Fuselage Fuel Tanks"
  location (X Y Z) 0 0 0, rotation 0 0 0
  bounding box size 9.5866 4.94399 1.90903
  mass: Density=1.563 Shell_Flag=0 Mass_Area=0 Mass_Prior=2
  Design: ChordTrimFlag=0 ChordTrimMax=0.9 ChordTrimMin=0.1 EtaTrimMax=0.9 EtaTrimMin=0.1 L01Max=1 L01Min=1 L0LenTrimMax=31.9196 L0LenTrimMin=22.3119 LTrimMax=0.658148 LTrimMin=0.460048 OffSetEnds=1 Offset=0.075 Side1Trim=0.1 Side1TrimFlag=1 Side2Trim=0.1 Side2TrimFlag=1 Side3Trim=0.1 Side3TrimFlag=1 Side4Trim=0.1 Side4TrimFlag=1 UMaxTrimTypeFalg=0 UMinTrimTypeFalg=0 UTrimFlag=1 UTrimMax=0.56 UTrimMin=0.45 V1TrimBegin=0.5 V1TrimEnd=0.1 V1TrimFlag=1 V2TrimBegin=0.4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

Fuselage "Center Pylon"
  location (X Y Z) 19.75 0 -2.81667, rotation 0 0 0
  bounding box size 13.8 0.75 0.5
  mass: Density=0 Shell_Flag=0 Mass_Area=0 Mass_Prior=0
  Design: Length=13.8
  cross sections:
    n  XLocPercent  YLocPercent  ZLocPercent  shape
    0  0            0            -0.0025      point
    1  0.25         0            0            rounded rectangle RoundRectXSec_Radius=0.2 RoundedRect_Height=0.5 RoundedRect_Width=0.75
    2  0.5          0            0            ellipse Ellipse_Height=0.5 Ellipse_Width=0.75
    3  0.75         0            0            as above
    4  1            0            -0.005       point

Ellipsoid "Center Drop Tank", child of "Center Pylon"
  location (X Y Z) 17.75 0 -4.25, rotation 0 0 0
  bounding box size 17.92 2.66 2.66
  mass: Density=0 Shell_Flag=0 Mass_Area=0 Mass_Prior=0 PointMass=89.885 CGx=0 CGy=0 CGz=0 Ixx=0 Iyy=0 Izz=0 Ixy=0 Ixz=0 Iyz=0
  Design: A_Radius=8.96 B_Radius=1.33 C_Radius=1.33

Gear "Front Tire"
  location (X Y Z) 12.75 0.425 -6.35, rotation 0 0 0
  symmetric about XZ
  bounding box size 1.83333 1.50833 1.83333
  mass: Density=0 Shell_Flag=0 Mass_Area=0 Mass_Prior=0
  bogie "Front Tires": NumAcross=1 NumTandem=1 Spacing=0.55 Pitch=1.19207 Symmetrical=0 XContactPt=0 YContactPt=0 TravelCompressed=1 TravelExtended=1 SteeringAngle=0 DiameterModel=1.0837 WidthModel=0.5 PlyRating=20
  bogie "New Gear": NumAcross=1 NumTandem=1 Spacing=0.724167 Pitch=2.01667 Symmetrical=0 XContactPt=0 YContactPt=0 TravelCompressed=1 TravelExtended=1 SteeringAngle=0 DiameterModel=1.83333 WidthModel=0.658333 PlyRating=20

Fuselage "Front Struct", child of "Front Tire"
  location (X Y Z) 12.75 0 -1.9, rotation 0 90 0
  bounding box size 0.5 0.5 4
  mass: Density=0 Shell_Flag=0 Mass_Area=0 Mass_Prior=1 PointMass=15.539 CGx=0 CGy=0 CGz=1 Ixx=0 Iyy=0 Izz=0 Ixy=0 Ixz=0 Iyz=0
  Design: Length=4
  cross sections:
    n  XLocPercent  YLocPercent  ZLocPercent  shape
    0  0            0            0            ellipse Ellipse_Height=0.35 Ellipse_Width=0.35
    1  0.25         0            0            ellipse Ellipse_Height=0.5 Ellipse_Width=0.5
    2  0.5          0            0            as above
    3  0.75         0            0            as above
    4  1            0            0            super ellipse Super_Height=0.5 Super_M=2 Super_MaxWidthLoc=0 Super_N=2 Super_Width=0.5

Fuselage "Diagonal Struct", child of "Front Tire"
  location (X Y Z) 16.25 0 -2.35, rotation -180 30 -180; relative location 16.25 0 -2.35, rotation 0 150 0
  bounding box size 3.6391 0.35 2.30311
  mass: Density=0 Shell_Flag=0 Mass_Area=0 Mass_Prior=0
  Design: Length=4
  cross sections:
    n  XLocPercent  YLocPercent  ZLocPercent  shape
    0  0            0            0            ellipse Ellipse_Height=0.35 Ellipse_Width=0.35
    1  0.25         0            0            as above
    2  0.5          0            0            as above
    3  0.75         0            0            as above
    4  1            0            0            super ellipse Super_Height=0.35 Super_M=2 Super_MaxWidthLoc=0 Super_N=2 Super_Width=0.35

Gear "Front Tire (Stored)", child of "Front Tire"
  location (X Y Z) 8.75 0.425 -1.8, rotation 0 0 0
  symmetric about XZ
  bounding box size 1.83333 1.50833 1.83333
  mass: Density=0 Shell_Flag=0 Mass_Area=0 Mass_Prior=0
  bogie "Front Tires": NumAcross=1 NumTandem=1 Spacing=0.55 Pitch=1.19207 Symmetrical=0 XContactPt=0 YContactPt=0 TravelCompressed=1 TravelExtended=1 SteeringAngle=0 DiameterModel=1.0837 WidthModel=0.5 PlyRating=20
  bogie "New Gear": NumAcross=1 NumTandem=1 Spacing=0.724167 Pitch=2.01667 Symmetrical=0 XContactPt=0 YContactPt=0 TravelCompressed=1 TravelExtended=1 SteeringAngle=0 DiameterModel=1.83333 WidthModel=0.658333 PlyRating=20

Fuselage "Front Struct (Stored)", child of "Front Tire"
  location (X Y Z) 12.75 0 -1.4, rotation -180 0 -180; relative location 12.75 0 -1.4, rotation 0 180 0
  bounding box size 4 0.5 0.5
  mass: Density=0 Shell_Flag=0 Mass_Area=0 Mass_Prior=0 PointMass=15.539 CGx=0 CGy=0 CGz=0 Ixx=0 Iyy=0 Izz=0 Ixy=0 Ixz=0 Iyz=0
  Design: Length=4
  cross sections:
    n  XLocPercent  YLocPercent  ZLocPercent  shape
    0  0            0            0            ellipse Ellipse_Height=0.35 Ellipse_Width=0.35
    1  0.25         0            0            ellipse Ellipse_Height=0.5 Ellipse_Width=0.5
    2  0.5          0            0            as above
    3  0.75         0            0            as above
    4  1            0            0            super ellipse Super_Height=0.5 Super_M=2 Super_MaxWidthLoc=0 Super_N=2 Super_Width=0.5

Fuselage "Diagonal Struct (Stored)", child of "Front Tire"
  location (X Y Z) 16.25 0 -1.85, rotation -180 0 -180; relative location 16.25 0 -1.85, rotation 0 180 0
  bounding box size 4 0.35 0.35
  mass: Density=0 Shell_Flag=0 Mass_Area=0 Mass_Prior=0
  Design: Length=4
  cross sections:
    n  XLocPercent  YLocPercent  ZLocPercent  shape
    0  0            0            0            ellipse Ellipse_Height=0.35 Ellipse_Width=0.35
    1  0.25         0            0            as above
    2  0.5          0            0            as above
    3  0.75         0            0            as above
    4  1            0            0            super ellipse Super_Height=0.35 Super_M=2 Super_MaxWidthLoc=0 Super_N=2 Super_Width=0.35

Gear "Aft Tires"
  location (X Y Z) 29.57 5 -6.35, rotation 0 0 0
  symmetric about XZ
  bounding box size 2.625 10.9375 2.625
  mass: Density=0 Shell_Flag=0 Mass_Area=0 Mass_Prior=0
  bogie "Front Tires": NumAcross=1 NumTandem=1 Spacing=0.55 Pitch=1.19207 Symmetrical=0 XContactPt=0 YContactPt=0 TravelCompressed=1 TravelExtended=1 SteeringAngle=0 DiameterModel=1.0837 WidthModel=0.5 PlyRating=20
  bogie "New Gear": NumAcross=1 NumTandem=1 Spacing=1.03125 Pitch=2.8875 Symmetrical=0 XContactPt=0 YContactPt=0 TravelCompressed=1 TravelExtended=1 SteeringAngle=0 DiameterModel=2.625 WidthModel=0.9375 PlyRating=20

Fuselage "Aft Structs", child of "Aft Tires"
  location (X Y Z) 27.57 -2.2 -2.25, rotation -35 75 0
  symmetric about XZ
  bounding box size 2.65016 9.87009 4.17342
  mass: Density=0 Shell_Flag=0 Mass_Area=0 Mass_Prior=0 PointMass=22.8315 CGx=1.2 CGy=0 CGz=0 Ixx=0 Iyy=0 Izz=0 Ixy=0 Ixz=0 Iyz=0
  Design: Length=4.5
  cross sections:
    n  XLocPercent  YLocPercent  ZLocPercent  shape
    0  0            0            0            ellipse Ellipse_Height=0.5 Ellipse_Width=0.5
    1  0.25         0            0            as above
    2  0.5          0            0            as above
    3  0.75         0            0            rounded rectangle RoundRectXSec_Radius=0.2 RoundedRect_Height=0.5 RoundedRect_Width=0.5
    4  0.875        0            0.00468211   as above
    5  1            0            0.23064      super ellipse Super_Height=0.5 Super_M=2 Super_MaxWidthLoc=0 Super_N=2 Super_Width=0.5

Fuselage "Aft Structs", child of "Aft Tires"
  location (X Y Z) 29.57 -2.5 -2, rotation -35 90 0
  symmetric about XZ
  bounding box size 0.5 10.5718 3.97297
  mass: Density=0 Shell_Flag=0 Mass_Area=0 Mass_Prior=0
  Design: Length=4.5
  cross sections:
    n  XLocPercent  YLocPercent  ZLocPercent  shape
    0  0            0            0            ellipse Ellipse_Height=0.35 Ellipse_Width=0.35
    1  0.25         0            0            ellipse Ellipse_Height=0.5 Ellipse_Width=0.5
    2  0.5          0            0            as above
    3  0.75         0            0            super ellipse Super_Height=0.5 Super_M=2 Super_MaxWidthLoc=0 Super_N=2 Super_Width=0.5
    4  0.875        0            0            as above
    5  1            0            0            as above

Gear "Aft Tires (Stored)", child of "Aft Tires"
  location (X Y Z) 40 3.4 -0.5, rotation 90 0 0
  symmetric about XZ
  bounding box size 2.625 7.3826 0.9375
  mass: Density=0 Shell_Flag=0 Mass_Area=0 Mass_Prior=0
  bogie "Front Tires": NumAcross=1 NumTandem=1 Spacing=0.55 Pitch=1.19207 Symmetrical=0 XContactPt=0 YContactPt=0 TravelCompressed=1 TravelExtended=1 SteeringAngle=0 DiameterModel=1.0837 WidthModel=0.5 PlyRating=20
  bogie "New Gear": NumAcross=1 NumTandem=1 Spacing=1.03125 Pitch=2.8875 Symmetrical=0 XContactPt=0 YContactPt=0 TravelCompressed=1 TravelExtended=1 SteeringAngle=0 DiameterModel=2.625 WidthModel=0.9375 PlyRating=20

Fuselage "Aft Structs (Stored)", child of "Aft Tires"
  location (X Y Z) 32 -2.75 -0.25, rotation -35 0 0
  symmetric about XZ
  bounding box size 5.5 6.19636 1.73547
  mass: Density=0 Shell_Flag=0 Mass_Area=0 Mass_Prior=0 PointMass=22.8315 CGx=2 CGy=0 CGz=0 Ixx=0 Iyy=0 Izz=0 Ixy=0 Ixz=0 Iyz=0
  Design: Length=5.5
  cross sections:
    n  XLocPercent  YLocPercent  ZLocPercent  shape
    0  0            0            0            ellipse Ellipse_Height=0.5 Ellipse_Width=0.5
    1  0.25         0            0            as above
    2  0.5          0            0            as above
    3  0.75         0            0            rounded rectangle RoundRectXSec_Radius=0.2 RoundedRect_Height=0.5 RoundedRect_Width=0.5
    4  0.875        0            0.00468211   as above
    5  1            0            0.23064      super ellipse Super_Height=0.5 Super_M=2 Super_MaxWidthLoc=0 Super_N=2 Super_Width=0.5

Fuselage "Aft Structs (Stored)", child of "Aft Tires"
  location (X Y Z) 34 -3.25 -0.75, rotation -25 0 0
  symmetric about XZ
  bounding box size 5 6.96512 0.465124
  mass: Density=0 Shell_Flag=0 Mass_Area=0 Mass_Prior=0
  Design: Length=5
  cross sections:
    n  XLocPercent  YLocPercent  ZLocPercent  shape
    0  0            0            0            ellipse Ellipse_Height=0.35 Ellipse_Width=0.35
    1  0.25         0            0            as above
    2  0.5          0            0            as above
    3  0.75         0            0            super ellipse Super_Height=0.35 Super_M=2 Super_MaxWidthLoc=0 Super_N=2 Super_Width=0.35
    4  0.875        0            0            as above
    5  1            0            0            as above

Mesh "MeshGeom"
  location (X Y Z) 0 0 0, rotation 0 0 0

Wing "Main_Wing"
  location (X Y Z) 18.153 0 -0.1, rotation 0 1.5 0
  symmetric about XZ
  bounding box size 19.0447 40.3423 1.58705
  mass: Density=0 Shell_Flag=1 Mass_Area=0.106375 Mass_Prior=0
  totals: TotalSpan=40.3423 TotalProjectedSpan=40.3423 TotalChord=10.2406 TotalArea=465 TotalAR=3.5 MAC=12.7958
  root: chord 18.1518, twist 0, airfoil file "NACA 64A006"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 BaseThickChord=0.0599854 ThickChord=0.0599854
  sections:
    n  Span     Root_Chord  Tip_Chord  Area     Sweep  Sweep_Location  Dihedral  Twist  Twist_Location  tip airfoil
    1  14       18.1518     8.95491    189.747  35     0               0         0      0.25            airfoil file "NACA 64A005"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 BaseThickChord=0.0500199 ThickChord=0.0500199
    2  6.17114  8.95491     4.90098    42.7533  35     0               0         -2     0.25            airfoil file "NACA 64A004"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 BaseThickChord=0.0400137 ThickChord=0.0400137
  SS_Control "Flaps": EtaStart=0.188388 EtaEnd=0.694061 Length_C_Start=0.25 Length_C_End=0.25 Length_Start=3.91387 Length_End=2.23873 LE_Flag=0 Surf_Type=2
  SS_Control "Ailerons": EtaStart=0.699061 EtaEnd=1 Length_C_Start=0.2 Length_C_End=0.2 Length_Start=1.77772 Length_End=0.980195 LE_Flag=0 Surf_Type=2
  SS_Control "Slats": EtaStart=0.15 EtaEnd=1 Length_C_Start=0.15 Length_C_End=0.2 Length_Start=2.42462 Length_End=0.980195 LE_Flag=1 Surf_Type=2

Conformal "Wing Fuel Tank", child of "Main_Wing"
  location (X Y Z) 18.153 0 -0.1, rotation 0 1.5 0; relative location 0 0 0, rotation 0 0 0
  symmetric about XZ
  bounding box size 10.8446 27.1959 1.13224
  mass: Density=1.54614 Shell_Flag=0 Mass_Area=1 Mass_Prior=1
  Design: ChordTrimFlag=1 ChordTrimMax=0.8 ChordTrimMin=0.27 EtaTrimMax=0.674061 EtaTrimMin=0.15 L01Max=1 L01Min=1 L0LenTrimMax=14.0808 L0LenTrimMin=0 LTrimMax=0.654084 LTrimMin=0 OffSetEnds=1 Offset=0.05 Side1Trim=0.1 Side1TrimFlag=0 Side2Trim=0.1 Side2TrimFlag=0 Side3Trim=0.1 Side3TrimFlag=0 Side4Trim=0.1 Side4TrimFlag=0 UMaxTrimTypeFalg=2 UMinTrimTypeFalg=2 UTrimFlag=1 UTrimMax=0.485592 UTrimMin=0.10806 V1TrimBegin=0.864865 V1TrimEnd=0.135135 V1TrimFlag=1 V2TrimBegin=0.398079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

Wing "HStab"
  location (X Y Z) 39.1742 2.3 -0.613, rotation 0 0 0
  symmetric about XZ
  bounding box size 10.3271 20.5863 0.516799
  mass: Density=0.421655 Shell_Flag=0 Mass_Area=1 Mass_Prior=0
  totals: TotalSpan=15.9863 TotalProjectedSpan=15.9863 TotalChord=6.66095 TotalArea=106.484 TotalAR=2.4 MAC=7.33355
  root: chord 10.3271, twist 0, airfoil file "NACA 65A005"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 BaseThickChord=0.0500215 ThickChord=0.0500215
  sections:
    n  Span     Root_Chord  Tip_Chord  Area    Sweep  Sweep_Location  Dihedral  Twist  Twist_Location  tip airfoil
    1  7.99314  10.3271     2.99485    53.242  40     0               0         0      0.25            airfoil file "NACA 65A004"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 BaseThickChord=0.0400263 ThickChord=0.0400263

Wing "VStab"
  location (X Y Z) 38.0649 2.5 0.25, rotation 70 0 0
  symmetric about XZ
  bounding box size 10.2053 10.8518 7.71384
  mass: Density=1.36479 Shell_Flag=0 Mass_Area=1 Mass_Prior=0
  totals: TotalSpan=16.1684 TotalProjectedSpan=16.1684 TotalChord=5.98831 TotalArea=96.8215 TotalAR=2.7 MAC=6.35494
  root: chord 8.55472, twist 0, airfoil file "NACA 65A004"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 BaseThickChord=0.0400263 ThickChord=0.0400263
  sections:
    n  Span     Root_Chord  Tip_Chord  Area     Sweep  Sweep_Location  Dihedral  Twist  Twist_Location  tip airfoil
    1  8.08421  8.55472     3.42189    48.4107  40     0               0         0      0.25            as above
  SS_Control "Rudder": EtaStart=0.1 EtaEnd=1 Length_C_Start=0.3 Length_C_End=0.3 Length_Start=2.41243 Length_End=1.02657 LE_Flag=0 Surf_Type=2
