F24HH_AIAA_FINAL

#Mach
0.8500

#IYsym   IZsym   Zsym
0        0       0.0

#Sref    Cref    Bref
465.0000  12.7958  40.3423

#Xref    Yref    Zref
29.3662  0.0  -0.1750

#--------------------------------------------------
SURFACE
Hstab
!Nchordwise  Cspace  Nspanwise  Sspace
10.0     1.0      12.0     -1.1

YDUPLICATE
0.0

ANGLE
0

SCALE
1.0   1.0   1.0

TRANSLATE
18.1530  0   0

SECTION
#Xle    Yle    Zle     Chord   Ainc  Nspanwise  Sspace
21.0212  0.0000   -0.6130  10.3271  0.0000
AFILE
C:\Users\14153\Desktop\Airfoil Library\NACA 65A005.dat

SECTION
#Xle    Yle    Zle     Chord   Ainc  Nspanwise  Sspace
21.0212  2.3000   -0.6130  10.3271  0.0000
AFILE
C:\Users\14153\Desktop\Airfoil Library\NACA 65A005.dat
CONTROL
#name   gain   Xhinge   XYZhvec   SgnDup
stabilator  1.0   0.25   0. 0. 0.   1

SECTION
#Xle    Yle    Zle     Chord   Ainc  Nspanwise  Sspace
27.7282  10.2931  -0.6130  2.9948   0.0000
AFILE
C:\Users\14153\Desktop\Airfoil Library\NACA 65A004.dat
CONTROL
#name   gain   Xhinge   XYZhvec   SgnDup
stabilator  1.0   0.25   0. 0. 0.   1

#--------------------------------------------------
SURFACE
Vstab
!Nchordwise  Cspace  Nspanwise  Sspace
8.0      1.0      14.0     1.0

YDUPLICATE
0.0

ANGLE
0

SCALE
1.0   1.0   1.0

TRANSLATE
18.1530  0   0

SECTION
#Xle    Yle    Zle     Chord   Ainc  Nspanwise  Sspace
19.9119  2.5000   0.2500   8.5547   0.0000
AFILE
C:\Users\14153\Desktop\Airfoil Library\NACA 65A004.dat

SECTION
#Xle    Yle    Zle     Chord   Ainc  Nspanwise  Sspace
20.5903  2.7765   1.0097   8.0414   0.0000
AFILE
C:\Users\14153\Desktop\Airfoil Library\NACA 65A004.dat
CONTROL
#name   gain   Xhinge   XYZhvec   SgnDup
rudder  1.0   0.7   0. 0. 0.   -1.0

SECTION
#Xle    Yle    Zle     Chord   Ainc  Nspanwise  Sspace
26.6954  5.2650   7.8467   3.4219   0.0000
AFILE
C:\Users\14153\Desktop\Airfoil Library\NACA 65A004.dat
CONTROL
#name   gain   Xhinge   XYZhvec   SgnDup
rudder  1.0   0.7   0. 0. 0.   -1.0

#--------------------------------------------------
SURFACE
Wing
!Nchordwise  Cspace  Nspanwise  Sspace
12.0     1.0      24.0     1.1

YDUPLICATE
0.0

ANGLE
1.5

SCALE
1.0   1.0   1.0

TRANSLATE
18.1530  0   0

SECTION
#Xle    Yle    Zle     Chord   Ainc  Nspanwise  Sspace
0.0000   0.0000   -0.1000  18.1518  0.0000
AFILE
C:\Users\14153\Desktop\Airfoil Library\NACA 64A006_TEST.dat

SECTION
#Xle    Yle    Zle     Chord   Ainc  Nspanwise  Sspace
2.1186   3.0257   -0.1000  16.1641  0.0000
AFILE
C:\Users\14153\Desktop\Airfoil Library\NACA 64A006_TEST.dat
CONTROL
#name   gain   Xhinge   XYZhvec   SgnDup
slat  -1.0   -0.15   0. 0. 0.   1.0

SECTION
#Xle    Yle    Zle     Chord   Ainc  Nspanwise  Sspace
2.6608   3.8000   -0.1000  15.6555  0.0000
AFILE
C:\Users\14153\Desktop\Airfoil Library\NACA 64A006_TEST.dat
CONTROL
#name   gain   Xhinge   XYZhvec   SgnDup
slat  -1.0   -0.15   0. 0. 0.   1.0
CONTROL
#name   gain   Xhinge   XYZhvec   SgnDup
flap  1.0   0.75   0. 0. 0.   1.0

SECTION
#Xle    Yle    Zle     Chord   Ainc  Nspanwise  Sspace
9.8029   14.0000  -0.1000  8.9549   0.0000
AFILE
C:\Users\14153\Desktop\Airfoil Library\NACA 64A005.dat
CONTROL
#name   gain   Xhinge   XYZhvec   SgnDup
slat  -1.0   -0.15   0. 0. 0.   1.0
CONTROL
#name   gain   Xhinge   XYZhvec   SgnDup
flap  1.0   0.75   0. 0. 0.   1.0

SECTION
#Xle    Yle    Zle     Chord   Ainc  Nspanwise  Sspace
9.8735   14.1009  -0.1000  8.8887   0.0000
AFILE
C:\Users\14153\Desktop\Airfoil Library\NACA 64A005.dat
CONTROL
#name   gain   Xhinge   XYZhvec   SgnDup
slat  -1.0   -0.15   0. 0. 0.   1.0
CONTROL
#name   gain   Xhinge   XYZhvec   SgnDup
aileron  1.0   0.8   0. 0. 0.   -1.0

SECTION
#Xle    Yle    Zle     Chord   Ainc  Nspanwise  Sspace
14.1240  20.1711  -0.1000  4.9010   -2.0000
AFILE
C:\Users\14153\Desktop\Airfoil Library\NACA 64A004_TEST.dat
CONTROL
#name   gain   Xhinge   XYZhvec   SgnDup
slat  -1.0   -0.2   0. 0. 0.   1.0
CONTROL
#name   gain   Xhinge   XYZhvec   SgnDup
aileron  1.0   0.75   0. 0. 0.   -1.0
