OpenVSP model (file version 5), 7 components.
Geometry view with OpenVSP parameter names; values to 6 digits, angles in degrees, lengths in the model's unit.
Overall bounding box: X_Min=0 X_Len=49.893 Y_Min=-20.1711 Y_Len=40.3423 Z_Min=-3.13012 Z_Len=11.0354

Fuselage "Fuselage"
  location (X Y Z) 0 0 0, rotation 0 0 0
  bounding box size 48.4 6.33404 5.93757
  mass: Density=0 Shell_Flag=0 Mass_Area=0 Mass_Prior=1
  Design: Length=48.4
  cross sections:
    n  XLocPercent  YLocPercent  YRotate  ZLocPercent  shape
    0  0            0            -1       -0.0306681   point
    1  0.223361     0            -2       -0.00985761  general fuselage BotStr=0.836571 BotTanAngle=90 CornerRad=0 Height=3.6 LowStr=0.1 MaxWidthLoc=0 TopStr=0.954214 TopTanAngle=90 UpStr=0.1 Width=4.2
    2  0.394304     0            -2       0.00438116   general fuselage BotStr=0.615863 BotTanAngle=90 CornerRad=0 Height=5 LowStr=0.1 MaxWidthLoc=0 TopStr=0.622398 TopTanAngle=90 UpStr=0.1 Width=5.38088
    3  0.706182     0            0        -0.0109529   general fuselage BotStr=1.09146 BotTanAngle=90 CornerRad=0 Height=5.2 LowStr=0.333321 MaxWidthLoc=0.235714 TopStr=0.450964 TopTanAngle=90 UpStr=0.352929 Width=6.02041
    4  0.875        0            0        -0.0109529   general fuselage BotStr=1.02311 BotTanAngle=90 CornerRad=0 Height=4.75 LowStr=0 MaxWidthLoc=0.142857 TopStr=0.488608 TopTanAngle=90 UpStr=0.414211 Width=5.5
    5  1            0            0        -0.0107463   general fuselage BotStr=0.830036 BotTanAngle=90 CornerRad=0 Height=3.9 LowStr=0.952373 MaxWidthLoc=0.171429 TopStr=0.620893 TopTanAngle=90 UpStr=0.470571 Width=4

Fuselage "Nozzle Exit"
  location (X Y Z) 46.643 0 -0.5, rotation 0 0 0
  bounding box size 3.25 3.85 3.85
  mass: Density=0 Shell_Flag=0 Mass_Area=0 Mass_Prior=0
  Design: Length=3.25
  cross sections:
    n  XLocPercent  YLocPercent  ZLocPercent  shape
    0  0            0            0            circle Circle_Diameter=3.85
    1  0.5          0            0            circle Circle_Diameter=3.65
    2  1            0            0            circle Circle_Diameter=3

Wing "Main_Wing"
  location (X Y Z) 18.153 0 -0.1, rotation 0 1.5 0
  symmetric about XZ
  bounding box size 19.0447 40.3423 1.58705
  mass: Density=0 Shell_Flag=1 Mass_Area=0.106375 Mass_Prior=0
  totals: TotalSpan=40.3423 TotalProjectedSpan=40.3423 TotalChord=10.2406 TotalArea=465 TotalAR=3.5 MAC=12.7958
  root: chord 18.1518, twist 0, airfoil file "NACA 64A006"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 BaseThickChord=0.0599854 ThickChord=0.0599854
  sections:
    n  Span     Root_Chord  Tip_Chord  Area     Sweep  Sweep_Location  Dihedral  Twist  Twist_Location  tip airfoil
    1  14       18.1518     8.95491    189.747  35     0               0         0      0.25            airfoil file "NACA 64A005"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 BaseThickChord=0.0500199 ThickChord=0.0500199
    2  6.17114  8.95491     4.90098    42.7533  35     0               0         -2     0.25            airfoil file "NACA 64A004"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 BaseThickChord=0.0400137 ThickChord=0.0400137
  SS_Control "Flaps": EtaStart=0.188388 EtaEnd=0.694061 Length_C_Start=0.25 Length_C_End=0.25 Length_Start=3.91387 Length_End=2.23873 LE_Flag=0 Surf_Type=2
  SS_Control "Ailerons": EtaStart=0.699061 EtaEnd=1 Length_C_Start=0.2 Length_C_End=0.2 Length_Start=1.77772 Length_End=0.980195 LE_Flag=0 Surf_Type=2
  SS_Control "Slats": EtaStart=0.15 EtaEnd=1 Length_C_Start=0.15 Length_C_End=0.2 Length_Start=2.42462 Length_End=0.980195 LE_Flag=1 Surf_Type=2

Conformal "Wing Fuel Tank", child of "Main_Wing"
  location (X Y Z) 18.153 0 -0.1, rotation 0 1.5 0; relative location 0 0 0, rotation 0 0 0
  symmetric about XZ
  bounding box size 10.8446 27.1959 1.13224
  mass: Density=1.54614 Shell_Flag=0 Mass_Area=1 Mass_Prior=1
  Design: ChordTrimFlag=1 ChordTrimMax=0.8 ChordTrimMin=0.27 EtaTrimMax=0.674061 EtaTrimMin=0.15 L01Max=1 L01Min=1 L0LenTrimMax=14.0808 L0LenTrimMin=0 LTrimMax=0.654084 LTrimMin=0 OffSetEnds=1 Offset=0.05 Side1Trim=0.1 Side1TrimFlag=0 Side2Trim=0.1 Side2TrimFlag=0 Side3Trim=0.1 Side3TrimFlag=0 Side4Trim=0.1 Side4TrimFlag=0 UMaxTrimTypeFalg=2 UMinTrimTypeFalg=2 UTrimFlag=1 UTrimMax=0.485592 UTrimMin=0.10806 V1TrimBegin=0.864865 V1TrimEnd=0.135135 V1TrimFlag=1 V2TrimBegin=0.398079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

Wing "HStab"
  location (X Y Z) 39.1726 2.3 -0.613, rotation 0 0 0
  symmetric about XZ
  bounding box size 10.3274 20.5867 0.516814
  mass: Density=0.421645 Shell_Flag=0 Mass_Area=1 Mass_Prior=0
  totals: TotalSpan=15.9867 TotalProjectedSpan=15.9867 TotalChord=6.66114 TotalArea=106.49 TotalAR=2.4 MAC=7.33375
  root: chord 10.3274, twist 0, airfoil file "NACA 65A005"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 BaseThickChord=0.0500215 ThickChord=0.0500215
  sections:
    n  Span     Root_Chord  Tip_Chord  Area    Sweep  Sweep_Location  Dihedral  Twist  Twist_Location  tip airfoil
    1  7.99337  10.3274     2.99493    53.245  40     0               0         0      0.25            airfoil file "NACA 65A004"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 BaseThickChord=0.0400263 ThickChord=0.0400263

Wing "VStab"
  location (X Y Z) 38.0649 2.5 0.25, rotation 70 0 0
  symmetric about XZ
  bounding box size 10.2053 10.8518 7.71384
  mass: Density=1.36479 Shell_Flag=0 Mass_Area=1 Mass_Prior=0
  totals: TotalSpan=16.1684 TotalProjectedSpan=16.1684 TotalChord=5.98831 TotalArea=96.8215 TotalAR=2.7 MAC=6.35494
  root: chord 8.55472, twist 0, airfoil file "NACA 65A004"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 BaseThickChord=0.0400263 ThickChord=0.0400263
  sections:
    n  Span     Root_Chord  Tip_Chord  Area     Sweep  Sweep_Location  Dihedral  Twist  Twist_Location  tip airfoil
    1  8.08421  8.55472     3.42189    48.4107  40     0               0         0      0.25            as above
  SS_Control "Rudder": EtaStart=0.1 EtaEnd=1 Length_C_Start=0.3 Length_C_End=0.3 Length_Start=2.41243 Length_End=1.02657 LE_Flag=0 Surf_Type=2

Mesh "MeshGeom"
  location (X Y Z) 0 0 0, rotation 0 0 0
  bounding box size 19.0196 40.3423 1.13391
  triangle mesh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
