OpenVSP model (file version 5), 10 components.
Geometry view with OpenVSP parameter names; values to 6 digits, angles in degrees, lengths in the model's unit.
Overall bounding box: X_Min=0 X_Len=49.893 Y_Min=-3.75 Y_Len=7.5 Z_Min=-5.18 Z_Len=9.92018

Fuselage "Fuselage"
  location (X Y Z) 0 0 0, rotation 0 0 0
  bounding box size 48.4 6.33404 5.93757
  mass: Density=0 Shell_Flag=0 Mass_Area=0 Mass_Prior=1 PointMass=221.491 CGx=24.2 CGy=0 CGz=0 Ixx=0 Iyy=0 Izz=0 Ixy=0 Ixz=0 Iyz=0
  Design: Length=48.4
  cross sections:
    n  XLocPercent  YLocPercent  YRotate  ZLocPercent  shape
    0  0            0            -1       -0.0306681   point
    1  0.223361     0            -2       -0.00985761  general fuselage BotStr=0.836571 BotTanAngle=90 CornerRad=0 Height=3.6 LowStr=0.1 MaxWidthLoc=0 TopStr=0.954214 TopTanAngle=90 UpStr=0.1 Width=4.2
    2  0.394304     0            -2       0.00438116   general fuselage BotStr=0.615863 BotTanAngle=90 CornerRad=0 Height=5 LowStr=0.1 MaxWidthLoc=0 TopStr=0.622398 TopTanAngle=90 UpStr=0.1 Width=5.38088
    3  0.706182     0            0        -0.0109529   general fuselage BotStr=1.09146 BotTanAngle=90 CornerRad=0 Height=5.2 LowStr=0.333321 MaxWidthLoc=0.235714 TopStr=0.450964 TopTanAngle=90 UpStr=0.352929 Width=6.02041
    4  0.875        0            0        -0.0109529   general fuselage BotStr=1.02311 BotTanAngle=90 CornerRad=0 Height=4.75 LowStr=0 MaxWidthLoc=0.142857 TopStr=0.488608 TopTanAngle=90 UpStr=0.414211 Width=5.5
    5  1            0            0        -0.0107463   general fuselage BotStr=0.830036 BotTanAngle=90 CornerRad=0 Height=3.9 LowStr=0.952373 MaxWidthLoc=0.171429 TopStr=0.620893 TopTanAngle=90 UpStr=0.470571 Width=4

Fuselage "Canopy", child of "Fuselage"
  location (X Y Z) 9.7 0 1, rotation 0 -5.90164 0
  bounding box size 18.2644 2.50007 5.33179
  mass: Density=0 Shell_Flag=0 Mass_Area=0 Mass_Prior=0
  Design: Length=18
  cross sections:
    n  XLocPercent  YLocPercent  YRotate  ZLocPercent  shape
    0  0            0            0        0.0075       point
    1  0.247329     0            0        0.0163934    super ellipse Super_Height=3 Super_M=2 Super_MaxWidthLoc=-0.171429 Super_N=2 Super_Width=2.5
    2  0.45709      0            7.07143  -0.00333333  super ellipse Super_Height=3 Super_M=2 Super_MaxWidthLoc=-0.5 Super_N=2 Super_Width=2.5
    3  1            0            0        -0.0444444   point

Fuselage "Air Intake", child of "Fuselage"
  location (X Y Z) 14 3.1 0, rotation 0 0 0
  symmetric about XZ
  bounding box size 33.5498 7.5 1.92147
  mass: Density=0 Shell_Flag=0 Mass_Area=0 Mass_Prior=0
  Design: Length=33.5
  cross sections:
    n  XLocPercent  XRotate   YLocPercent  YRotate   ZLocPercent  ZRotate  shape
    0  0            -20       -0.01        0.642857  -0.0205943   5        rounded rectangle RoundRectXSec_Radius=0.2 RoundedRect_Height=1.46341 RoundedRect_Width=1
    1  0.25         -9.28826  -0.005       0         -0.018       0        rounded rectangle RoundRectXSec_Radius=0.2 RoundedRect_Height=1.46341 RoundedRect_Width=1.30037
    2  0.5          0         0            0         -0.015       0        super ellipse Super_Height=1.3 Super_M=2 Super_MaxWidthLoc=0 Super_N=2 Super_Width=1.3
    3  0.75         0         0            0         -0.011       0        rounded rectangle RoundRectXSec_Radius=0.2 RoundedRect_Height=1.3 RoundedRect_Width=1.3
    4  0.875        0         -0.01        0         -0.01        0        as above
    5  1            0         -0.0307463   0         -0.01        0        rounded rectangle RoundRectXSec_Radius=0.2 RoundedRect_Height=0 RoundedRect_Width=0

Blank "Fuel System Mass", child of "Fuselage"
  location (X Y Z) 0 0 0, rotation 0 0 0
  mass: Density=1 Shell_Flag=0 Mass_Area=1 Mass_Prior=0 PointMass=31.432 CGx=27.195 CGy=0 CGz=0 Ixx=0 Iyy=0 Izz=0 Ixy=0 Ixz=0 Iyz=0

Blank "Ordinance Pylons Mass", child of "Fuselage"
  location (X Y Z) 0 0 0, rotation 0 0 0
  mass: Density=1 Shell_Flag=0 Mass_Area=1 Mass_Prior=0 PointMass=37.297 CGx=27.195 CGy=0 CGz=0 Ixx=0 Iyy=0 Izz=0 Ixy=0 Ixz=0 Iyz=0

Fuselage "F100-PW-229 (Engine)"
  location (X Y Z) 1 0 -0.5, rotation 0 0 0
  bounding box size 6.66717e-05 3.53553e-05 3.53553e-05
  mass: Density=0 Shell_Flag=0 Mass_Area=0 Mass_Prior=0
  Design: Length=1e-08
  cross sections:
    n  XLocPercent  YLocPercent  ZLocPercent  shape
    0  0            0            0            point
    1  0.25         0            0            ellipse Ellipse_Height=0 Ellipse_Width=0
    2  0.5          0            0            as above
    3  0.75         0            0            as above
    4  1            0            0            point

Fuselage "External Casing", child of "F100-PW-229 (Engine)"
  location (X Y Z) 33.5 0 -0.5, rotation 0 0 0
  bounding box size 14.9143 3.875 3.875
  mass: Density=0 Shell_Flag=0 Mass_Area=0 Mass_Prior=1 PointMass=167.63 CGx=7.16251 CGy=0 CGz=0 Ixx=0 Iyy=0 Izz=0 Ixy=0 Ixz=0 Iyz=0
  Design: Length=14.9143
  cross sections:
    n  XLocPercent  YLocPercent  ZLocPercent  shape
    0  0            0            0            circle Circle_Diameter=3.875
    1  0.25         0            0            circle Circle_Diameter=3.6
    2  0.5          0            0            ellipse Ellipse_Height=3.6 Ellipse_Width=3.6
    3  0.625        0            0            as above
    4  0.8125       0            0            ellipse Ellipse_Height=3.6 Ellipse_Width=3.875
    5  1            0            0            circle Circle_Diameter=3.46415

Fuselage "Nozzle Exit", child of "F100-PW-229 (Engine)"
  location (X Y Z) 46.643 0 -0.5, rotation 0 0 0
  bounding box size 3.25 3.85 3.85
  mass: Density=0 Shell_Flag=0 Mass_Area=0 Mass_Prior=0
  Design: Length=3.25
  cross sections:
    n  XLocPercent  YLocPercent  ZLocPercent  shape
    0  0            0            0            circle Circle_Diameter=3.85
    1  0.5          0            0            circle Circle_Diameter=3.65
    2  1            0            0            circle Circle_Diameter=3

Fuselage "Center Pylon"
  location (X Y Z) 18 0 -2.3, rotation 0 0 0
  bounding box size 13.8 0.75 0.5
  Design: Length=13.8
  cross sections:
    n  XLocPercent  YLocPercent  ZLocPercent  shape
    0  0            0            0            point
    1  0.25         0            0            rounded rectangle RoundRectXSec_Radius=0.2 RoundedRect_Height=0.5 RoundedRect_Width=0.75
    2  0.5          0            0            ellipse Ellipse_Height=0.5 Ellipse_Width=0.75
    3  0.75         0            0            as above
    4  1            0            0            point

Ellipsoid "Center Drop Tank", child of "Center Pylon"
  location (X Y Z) 16 0 -3.85, rotation 0 0 0
  bounding box size 17.92 2.66 2.66
  mass: Density=1 Shell_Flag=0 Mass_Area=1 Mass_Prior=0 PointMass=89.885 CGx=0 CGy=0 CGz=0 Ixx=0 Iyy=0 Izz=0 Ixy=0 Ixz=0 Iyz=0
  Design: A_Radius=8.96 B_Radius=1.33 C_Radius=1.33
