OpenVSP model (file version 5), 2 components.
Geometry view with OpenVSP parameter names; values to 6 digits, angles in degrees, lengths in the model's unit.
Overall bounding box: X_Min=0 X_Len=49.893 Y_Min=-3.16702 Y_Len=6.33404 Z_Min=-3.13012 Z_Len=5.93757

Fuselage "Fuselage"
  location (X Y Z) 0 0 0, rotation 0 0 0
  bounding box size 48.4 6.33404 5.93757
  mass: Density=0 Shell_Flag=0 Mass_Area=0 Mass_Prior=1
  Design: Length=48.4
  cross sections:
    n  XLocPercent  YLocPercent  YRotate  ZLocPercent  shape
    0  0            0            -1       -0.0306681   point
    1  0.223361     0            -2       -0.00985761  general fuselage BotStr=0.836571 BotTanAngle=90 CornerRad=0 Height=3.6 LowStr=0.1 MaxWidthLoc=0 TopStr=0.954214 TopTanAngle=90 UpStr=0.1 Width=4.2
    2  0.394304     0            -2       0.00438116   general fuselage BotStr=0.615863 BotTanAngle=90 CornerRad=0 Height=5 LowStr=0.1 MaxWidthLoc=0 TopStr=0.622398 TopTanAngle=90 UpStr=0.1 Width=5.38088
    3  0.706182     0            0        -0.0109529   general fuselage BotStr=1.09146 BotTanAngle=90 CornerRad=0 Height=5.2 LowStr=0.333321 MaxWidthLoc=0.235714 TopStr=0.450964 TopTanAngle=90 UpStr=0.352929 Width=6.02041
    4  0.875        0            0        -0.0109529   general fuselage BotStr=1.02311 BotTanAngle=90 CornerRad=0 Height=4.75 LowStr=0 MaxWidthLoc=0.142857 TopStr=0.488608 TopTanAngle=90 UpStr=0.414211 Width=5.5
    5  1            0            0        -0.0107463   general fuselage BotStr=0.830036 BotTanAngle=90 CornerRad=0 Height=3.9 LowStr=0.952373 MaxWidthLoc=0.171429 TopStr=0.620893 TopTanAngle=90 UpStr=0.470571 Width=4

Fuselage "Nozzle Exit"
  location (X Y Z) 46.643 0 -0.5, rotation 0 0 0
  bounding box size 3.25 3.85 3.85
  mass: Density=0 Shell_Flag=0 Mass_Area=0 Mass_Prior=0
  Design: Length=3.25
  cross sections:
    n  XLocPercent  YLocPercent  ZLocPercent  shape
    0  0            0            0            circle Circle_Diameter=3.85
    1  0.5          0            0            circle Circle_Diameter=3.65
    2  1            0            0            circle Circle_Diameter=3
